*Heading
** Job name: ParaPy Project Model name: ParaPy Model
** Generated by: ParaPy abaqus 0.1.15
*PrePrint, ECHO=NO, MODEL=NO, HISTORY=NO, CONTACT=NO
**
** PARTS
**
*Part, NAME=Upper_Skin
*Node
63, -1.66370911638478, 7.703846153846154, 0.2337460182128645
59, -2.450899581674623, 5.8730769230769235, 0.2578896009945202
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*Element, TYPE=S3R
225, 2, 36, 57
227, 37, 38, 185
163, 1, 22, 13
167, 25, 26, 158
*Element, TYPE=S4R
226, 36, 37, 185, 57
228, 38, 4, 82, 185
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*ElSet, ELSET=Upper_Skin
225, 226, 227, 228, 229, 230
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*Shell Section, ELSET=Upper_Skin, MATERIAL=test_material-2
0.003
*End Part
*Part, NAME=lower_Skin
*Node
90, 1.6536208998242137, 12.738461538461538, -0.04932940692913035
92, 1.3431647263447732, 11.823076923076922, -0.05288775866141293
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*Element, TYPE=S4R
205, 3, 5, 39, 27
206, 27, 39, 40, 28
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*Element, TYPE=S3R
163, 1, 22, 13
167, 25, 26, 158
226, 38, 37, 185
228, 36, 2, 81
*ElSet, ELSET=lower_Skin
205, 206, 207, 208, 209, 210
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*Shell Section, ELSET=lower_Skin, MATERIAL=test_material-2
0.003
*End Part
*Part, NAME=front_spar
*Node
32, -1.66370911638478, 7.703846153846154, 0.2337460182128645
59, -1.270113883739858, 8.619230769230768, -0.12915729744589743
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*Element, TYPE=S4R
88, 5, 50, 75, 6
89, 50, 49, 74, 75
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*Element, TYPE=S3R
77, 1, 16, 7
*ElSet, ELSET=front_spar
88, 89, 90, 91, 92, 93
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*Shell Section, ELSET=front_spar, MATERIAL=test_material-2
0.01
*End Part
*Part, NAME=rear_spar
*Node
67, 1.6536208998242126, 12.738461538461534, -0.04932940692913035
31, -0.0538880543127096, 7.703846153846154, 0.16677746203066643
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*Element, TYPE=S4R
86, 5, 49, 74, 6
87, 49, 48, 73, 74
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*ElSet, ELSET=rear_spar
86, 87, 88, 89, 90, 91
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*Shell Section, ELSET=rear_spar, MATERIAL=test_material-2
0.01
*End Part
**
** ASSEMBLY
**
*Assembly, NAME=Assembly
*Instance, NAME=Upper_Skin-instance, PART=Upper_Skin
*End Instance
*Instance, NAME=lower_Skin-instance, PART=lower_Skin
*End Instance
*Instance, NAME=front_spar-instance, PART=front_spar
*End Instance
*Instance, NAME=rear_spar-instance, PART=rear_spar
*End Instance
*ElSet, ELSET=None-SET, INSTANCE=Upper_Skin-instance
205, 206, 207, 208, 209, 210, 211, 212,
213, 214
*ElSet, ELSET=None-SET-1, INSTANCE=Upper_Skin-instance
215, 216, 217, 218, 219, 220, 221, 222,
223, 224
*ElSet, ELSET=None-SET-2, INSTANCE=Upper_Skin-instance
279, 280, 281, 282, 283, 284
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*ElSet, ELSET=None-SET-3, INSTANCE=Upper_Skin-instance
305, 306, 307, 308, 309, 310
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*ElSet, ELSET=None-SET-4, INSTANCE=lower_Skin-instance
205, 206, 207, 208, 209, 210, 211, 212,
213, 214
*ElSet, ELSET=None-SET-5, INSTANCE=lower_Skin-instance
215, 216, 217, 218, 219, 220, 221, 222,
223, 224
*ElSet, ELSET=None-SET-6, INSTANCE=lower_Skin-instance
279, 280, 281, 282, 283, 284
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*ElSet, ELSET=None-SET-7, INSTANCE=lower_Skin-instance
305, 306, 307, 308, 309, 310
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*ElSet, ELSET=None-ELSET-E1, INSTANCE=rear_spar-instance
85, 84, 83, 82, 81, 80, 79, 78,
77, 76
*ElSet, ELSET=None-ELSET-E3, INSTANCE=rear_spar-instance
85, 84, 83, 82, 81, 80, 79, 78,
77, 76
*ElSet, ELSET=None-ELSET-E1-1, INSTANCE=rear_spar-instance
111, 110, 109, 108, 107, 106
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*ElSet, ELSET=None-ELSET-E3-1, INSTANCE=rear_spar-instance
111, 110, 109, 108, 107, 106
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*ElSet, ELSET=None-ELSET-E3-2, INSTANCE=front_spar-instance
77
*ElSet, ELSET=None-ELSET-E2, INSTANCE=front_spar-instance
87, 86, 85, 84, 83, 82, 81, 80,
79
*ElSet, ELSET=None-ELSET-E2-1, INSTANCE=front_spar-instance
78
*ElSet, ELSET=None-ELSET-E4, INSTANCE=front_spar-instance
87, 86, 85, 84, 83, 82, 81, 80,
79
*ElSet, ELSET=None-ELSET-E1-2, INSTANCE=front_spar-instance
113, 112, 111, 110, 109, 108
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*ElSet, ELSET=None-ELSET-E3-3, INSTANCE=front_spar-instance
113, 112, 111, 110, 109, 108
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*NSet, NSET=set, INSTANCE=Upper_Skin-instance
1, 22, 23, 24, 25, 26, 3
*NSet, NSET=set-1, INSTANCE=lower_Skin-instance
1, 22, 23, 24, 25, 26, 3
*NSet, NSET=set-2, INSTANCE=front_spar-instance
1, 16, 3
*NSet, NSET=set-3, INSTANCE=rear_spar-instance
1, 3
*Surface, TYPE=ELEMENT, NAME=surface
None-SET, SPOS
*Surface, TYPE=ELEMENT, NAME=surface-1
None-SET-1, SPOS
*Surface, TYPE=ELEMENT, NAME=surface-2
None-SET-2, SPOS
*Surface, TYPE=ELEMENT, NAME=surface-3
None-SET-3, SPOS
*Surface, TYPE=ELEMENT, NAME=surface-4
None-SET-4, SPOS
*Surface, TYPE=ELEMENT, NAME=surface-5
None-SET-5, SPOS
*Surface, TYPE=ELEMENT, NAME=surface-6
None-SET-6, SPOS
*Surface, TYPE=ELEMENT, NAME=surface-7
None-SET-7, SPOS
*Surface, TYPE=ELEMENT, NAME=surface-8
None-ELSET-E1, E1
*Surface, TYPE=ELEMENT, NAME=surface-9
None-ELSET-E3, E3
*Surface, TYPE=ELEMENT, NAME=surface-10
None-ELSET-E1-1, E1
*Surface, TYPE=ELEMENT, NAME=surface-11
None-ELSET-E3-1, E3
*Surface, TYPE=ELEMENT, NAME=surface-12
None-ELSET-E3-2, E3
None-ELSET-E2, E2
*Surface, TYPE=ELEMENT, NAME=surface-13
None-ELSET-E2-1, E2
None-ELSET-E4, E4
*Surface, TYPE=ELEMENT, NAME=surface-14
None-ELSET-E1-2, E1
*Surface, TYPE=ELEMENT, NAME=surface-15
None-ELSET-E3-3, E3
*Tie, NAME=tie, TYPE=Surface to Surface
surface-8, surface
*Tie, NAME=tie-1, TYPE=Surface to Surface
surface-10, surface-2
*Tie, NAME=tie-2, TYPE=Surface to Surface
surface-12, surface-1
*Tie, NAME=tie-3, TYPE=Surface to Surface
surface-14, surface-3
*Tie, NAME=tie-4, TYPE=Surface to Surface
surface-9, surface-4
*Tie, NAME=tie-5, TYPE=Surface to Surface
surface-11, surface-6
*Tie, NAME=tie-6, TYPE=Surface to Surface
surface-13, surface-5
*Tie, NAME=tie-7, TYPE=Surface to Surface
surface-15, surface-7
*End Assembly
**
** MATERIALS
**
*Material, NAME=test_material-2
*Density
2810
*Elastic
72000000000.0, 0.33
**
** STEPS
**
** Name: boundary-condition Type: Displacement/Rotation
*Boundary
set, 1, 1
set, 2, 2
set, 3, 3
set, 4, 4
set, 5, 5
set, 6, 6
** Name: boundary-condition-1 Type: Displacement/Rotation
*Boundary
set-1, 1, 1
set-1, 2, 2
set-1, 3, 3
set-1, 4, 4
set-1, 5, 5
set-1, 6, 6
** Name: boundary-condition-2 Type: Displacement/Rotation
*Boundary
set-2, 1, 1
set-2, 2, 2
set-2, 3, 3
set-2, 4, 4
set-2, 5, 5
set-2, 6, 6
** Name: boundary-condition-3 Type: Displacement/Rotation
*Boundary
set-3, 1, 1
set-3, 2, 2
set-3, 3, 3
set-3, 4, 4
set-3, 5, 5
set-3, 6, 6
**
** STEP: analysis1
**
*Step, NAME=analysis1, NLGEOM=NO
*Static
0.01, 1.0, 1e-15, 0.1
*Output, NAME=field-output, FIELD, VARIABLE=PRESELECT
*Output, NAME=history-output, HISTORY, VARIABLE=PRESELECT
*End Step
